clear
variable output string /rds/user/lkm41/hpc-work/Hypersonic_TiO2

log                     ${output}/logs/log_${T}_${P}.lammps #to create mutiple log files

units                   metal
dimension               3
boundary                p p p
atom_style              full

#--------------------------------------------------------------------------------

# Variables - let you make your input scripts dynamic instead of hard-coding numbers everywhere.
variable                Nsteps equal 100000
variable                dt equal 5.0
variable                seed equal 20000 # random number seed
#--------------------------------------------------------------------------------

# creating simulation box
read_data               data.Ti extra/bond/types 1 extra/bond/per/atom 2


#change_box all z final 0 ${Lz} units box #for only change in Lz
change_box              all x final 0 ${Lx} y final 0 ${Ly} z final 0 ${Lz} units box #for change in Lz, Lx, and Ly

timestep                0.0005 #0.5 fs

neighbor                1.5 bin #Which atoms are close enough to potentially interact? - include atoms up to 1.5 Å beyond the force cutoff in the neighbour list.

#---------------------------------------------------------------------------------------------

# Automated titanium regions

region                  Ti_zone block ${Lx_Ti_zone1} ${Lx_Ti_zone2} ${Ly_Ti_zone1} ${Ly_Ti_zone2} ${Lz_Ti_zone1} ${Lz_Ti_zone2} units box

region                  upper block ${Lx_Ti_upper1} ${Lx_Ti_upper2} ${Ly_Ti_upper1} ${Ly_Ti_upper2} ${Lz_Ti_upper1} ${Lz_Ti_upper2} units box

region                  middle block ${Lx_Ti_middle1} ${Lx_Ti_middle2} ${Ly_Ti_middle1} ${Ly_Ti_middle2} ${Lz_Ti_middle1} ${Lz_Ti_middle2} units box

region                  bottom block ${Lx_Ti_bottom1} ${Lx_Ti_bottom2} ${Ly_Ti_bottom1} ${Ly_Ti_bottom2} ${Lz_Ti_bottom1} ${Lz_Ti_bottom2} units box
#---------------------------------------------------------------------------------------------
#observation regions
region                  obs_Ti block ${Lx_Ti_upper1} ${Lx_Ti_upper2} ${Ly_Ti_upper1} ${Ly_Ti_upper2} ${Lz_Ti_upper1} ${Lz_Ti_upper2} units box #observation region - to observe temperature of moving Ti layer

region                  obs block ${Lx_Ti_obs1} ${Lx_Ti_obs2} ${Ly_Ti_upper1} ${Ly_Ti_upper2} ${Lz_Ti_upper1} ${Lz_Ti_upper2} units box #observation region - for physisorption effect

#---------------------------------------------------------------------------------------------------------------

#lennard-jones and eam
pair_style              hybrid lj/cut 15.0 eam/fs #changed from 15 to 10

pair_coeff              * * eam/fs Ti1.eam.fs Ti NULL #Ti-Ti
pair_coeff              2 2 lj/cut 0.0044640704 3.00578 #O-O #taken from:
pair_coeff              1 2 lj/cut 0.0105961 2.60289 #Ti-O #mixing lennard jones potential

# O2 Bonds
bond_style              harmonic #how bonded atoms interact - use a harmonic spring model for all bonds.
bond_coeff              1 847.0 1.21 #sets the numerical parameters for a bond type after you choose the bond model with bond_style

special_bonds           lj 0.0 0.0 1.0

#creating atoms for Ti_zone
lattice                 hcp 2.95
create_atoms            1 region Ti_zone
#defining Ti region
group                   titanium type 1
#-------------------------------------------------------------------------------------
#Ti_zone groups
group                   bottom region bottom
group                   middle region middle
group                   upper region upper
#-------------------------------------------------------------------------------------

#creating O2 molecules
molecule                O2 O2.txt

#inlets and outlet regions

region                  inlet block 0 ${Lx_ten} 0 ${Ly} 0 ${Lz} units box

create_atoms            1 random 1 ${seed} inlet mol O2 ${seed} units box

group                    O2_zone type 2

# Define a dynamic group for injected O atoms
group                   injected dynamic O2_zone region inlet every 4

# Deposit O2 molecules into inlet region
fix                     injector O2_zone deposit 50000000 1 4 ${seed} mol O2 region inlet vx ${Vxmin} ${Vxmax} vy 0 0 vz 0 0 near 1.5 units box

#fix                     injector O2_zone deposit 100 0 4 ${seed} mol O2 region inlet vx ${Vxmin} ${Vxmax} vy 0 0 vz 0 0 near 1.5 units box
#---------------------------------------------------------------------------------------------------------
#obervation group for physisorption
group                   obs dynamic O2_zone region obs every 1000

#obervation group for titanium temp
group                   obs_Ti dynamic titanium region obs_Ti every 1000
#fix                     balance all balance 1000 1.2 rcb
#----------------------------------------------------------------------------------------------------
group                   mobile subtract all bottom middle

fix                     freeze bottom setforce 0.0 0.0 0.0
#----------------------------------------------------------------------------------------------------------------------
# Instantly thermalize injected molecules to temperature T
compute                 thermalizeO2_t injected temp/com
compute_modify          thermalizeO2_t dynamic/dof yes
fix                     thermalizeO2 injected temp/rescale 1 ${T} ${T} 0.0 1.0
fix_modify              thermalizeO2 dynamic/dof yes temp thermalizeO2_t

unfix                   thermalizeO2

#----------------------------------------------------------------------------------------------------------------
#to observe temperature of system

region                  O2_temp_region block 50 100 0 ${Ly} 0 ${Lz} units box

group                   O2_Tempcheck dynamic O2_zone region O2_temp_region every 100

compute                 T_O2 O2_Tempcheck temp
compute                 T_O2_nonxh O2_Tempcheck temp/profile 1 0 0 x 1

#region                  outlet block  ${Lx_outlet} ${Lx} INF INF INF INF units box
variable                Lx_outlet1 equal (lx/2)+200
region                  outlet block ${Lx_outlet1} INF INF INF INF INF units box
#---------------------------------------------------------------------------------------------------------------

#-----------------------------------------------------------------------------------------------------------------
#obervation group for O2ls

minimize                1e-6 1e-6 1000 10000 # shift atom locations to minimize the potential energy of the system. Helps if we accidentally introduce atoms that are overlapping and repel each other very strongly.

velocity                all create ${T} ${seed} rot yes mom no #sets or modifies atom velocities.
velocity                bottom set 0.0 0.0 0. #check with a one nve
velocity                middle create ${T} ${seed} mom yes rot no dist gaussian

fix                     integrator all nve
#----------------------------------------------------------------------------------------------------------------------

#count the number of atoms
variable                n_obs equal count(obs)

#measure the temperature of physisorption region
compute                 obsTemp obs temp

#measure temperature of Ti
compute                 obs_TiTemp obs_Ti temp

#measure the number at the outlet
group                   outlet_atoms dynamic O2_zone region outlet every 100
variable                nout equal count(outlet_atoms)
#-----------------------------------------------------------------------------------------------------------------------

# Central 200 Å × 200 Å y-z sampling region for the 1D x-direction density and velocity profiles
region                  profile_region block INF INF 444.3 644.3 445.1 645.1 units box

# 1D bins along x
compute                 chunkx O2_zone chunk/atom bin/1d x lower 10.0 units box region profile_region

# 1D number density profile along x
fix                     densprof O2_zone ave/chunk 100 10 1000 chunkx density/number file ${output}/dat_files/density_profile.dat

# 1D mean x-velocity profile along x
fix                     vxprof O2_zone ave/chunk 100 10 1000 chunkx vx file ${output}/dat_files/vx_profile.dat

#----

# Velocity moments required for local translational temperature of shock #this code was never actually run, so check for bugs but not needed to run simulation
variable                vx2 atom vx*vx
variable                vy2 atom vy*vy
variable                vz2 atom vz*vz

fix                     tempmom O2_zone ave/chunk 100 10 1000 chunkx vx vy vz v_vx2 v_vy2 v_vz2 file ${output}/dat_files/temperature_moments.dat
#_______________________________________________________________________________________________________________________

#outputs
thermo_style            custom step etotal ke pe density temp press c_obsTemp c_obs_TiTemp v_n_obs c_T_O2 c_T_O2_nonxh v_nout # what to print

thermo                  1000 # print every 1000 timesteps

dump                    mydump all custom 1000 ${output}/dumps/dump_${T}_${P}.lammpstrj id type x y z vx vy vz

#---------------------------------------------------------------------------------------------------------------------
#delete atoms only worked when was below dumps line for some reason
fix                     deleteatoms O2_zone evaporate 1 1000000000 outlet ${seed} molecule yes
#--------------------------------------------------------------------------------------------------------------------

restart                 100000 ${output}/restarts_TiO2/restart.*

run                     5000000
print                   "simulation done."

#--------------------------------------------------------------------------------------------------------------------
